<Lems>

    <!--

        This LEMS file has been automatically generated using PyNeuroML v0.3.14 (libNeuroML v0.2.45)

     -->

    <!-- Specify which component to run -->
    <Target component="Test_AA0173"/>

    <!-- Include core NeuroML2 ComponentType definitions -->
    <Include file="Cells.xml"/>
    <Include file="Networks.xml"/>
    <Include file="Simulation.xml"/>

    <Include file="Net_AA0173.net.nml"/>
    <Include file="AA0173_active.cell.nml"/>
    <Include file="pas.channel.nml"/>

    <Simulation id="Test_AA0173" length="400ms" step="0.025ms" target="Net_AA0173" seed="12345">  <!-- Note seed: ensures same random numbers used every run -->

        <Display id="Some_voltages" title="Plots of Some_voltages" timeScale="1ms" xmin="-40.0" xmax="440.0" ymin="-80" ymax="40">
            <Line id="Pop_AA0173_0_AA0173_0_v" quantity="Pop_AA0173/0/AA0173/0/v" scale="1mV" color="#6aa799" timeScale="1ms"/>
            <Line id="Pop_AA0173_0_AA0173_1002_v" quantity="Pop_AA0173/0/AA0173/1002/v" scale="1mV" color="#029a72" timeScale="1ms"/>
            <Line id="Pop_AA0173_0_AA0173_1000061_v" quantity="Pop_AA0173/0/AA0173/1000061/v" scale="1mV" color="#d340bb" timeScale="1ms"/>
        </Display>

        <OutputFile id="AA0173_voltages_dat" fileName="AA0173_voltages.dat">
            <OutputColumn id="Pop_AA0173_0_AA0173_0_v" quantity="Pop_AA0173/0/AA0173/0/v"/>
            <OutputColumn id="Pop_AA0173_0_AA0173_1002_v" quantity="Pop_AA0173/0/AA0173/1002/v"/>
            <OutputColumn id="Pop_AA0173_0_AA0173_1000061_v" quantity="Pop_AA0173/0/AA0173/1000061/v"/>
        </OutputFile>

    </Simulation>

</Lems>
